a := 0.0000001
T := 50
g(b, t, s) := b - s
f(b, t, s) := -b + s
[t[0]; s[0]; b[0]; yp[0]; yk[0]] := [1; 0; 0; 15; 1000000 - 15]
tn := 365
τ := 1
n := (tn - t[0])/τ
n = 364
i := 0 .. n
[t[i]; s[i + 1]; b[i + 1]; yp[i + 1]; yk[i + 1]; tp[i + 1]] := [
    t[0] + i*τ;
    if(t[0] + i*τ ≤ T, 0, a*yp[i - T/τ]*yk[i - T/τ]);
    yp[i]*yk[i]*a;
    yp[i] + τ*g(b[i], t[0] + i*τ, s[i]);
    yk[i] + τ*f(b[i], t[0] + i*τ, s[i]);
    if(t[0] + i*τ ≥ 2, yp[i] - yp[i - 1], yp[i])
]
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b[0] := 0
d[0] := 1
ps := 0.06
τ := 1
[d[0]; p[0]; profit[0]; k[0]; income[0]; tempt[0]] := [1; 100; 150000; 101; 0; 0.2]
[
    d[i + 1];
    k[i + 1];
    p[i + 1];
    profit[i + 1];
    income[i + 1];
    predin[i + 1];
    turn[i + 1];
    tempt[i + 1]
] := [
    d[i]*(1 + 0.005);
    k[i] + d[i];
    k[i]*(1 + ps);
    profit[i] + k[i]*b[i] - p[i]*if(t[i] > T, s[i - T/τ], 0) - if(profit[i] > 0, profit[i]*0.03, 0) - 500000;
    income[i] + profit[i]*0.03;
    if(t[i] ≥ 2, income[i] - income[i - 1], 0);
    if(t[i] > T, p[i] - k[i - T/τ], 0);
    if(t[i] ≤ T, tempt[0], (p[i] - k[i - T/τ])/k[i - T/τ])
]
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