# Задание 1 | Задание 2
23 + 17 = 40
(345*45 + 67)/(89 - 15) = 210.703
67^3 - 45*1.2 = 300709
x := 4, 3.5 .. 0 = [4; 3.5; 3; 2.5; 2; 1.5; 1; 0.5; 0]
z := 8 .. 16 = [8; 9; 10; 11; 12; 13; 14; 15; 16]
# 1)
(238^3 - 56)/nthroot(14^2 - 75, 5) = 5166209
sqrt(3^2 + 1/5 + 17) = 5.11859
# 2)
cos(3*π/7) = 0.222521
sin(3*π/8)^2 - sqrt(963 - 27^2) = -14.4435
(sqrt(8.25) - 6^3 - sin(3*π)^3)/(tan(π)^2 + cos(π)^2) = -213.128
e^-2 + sin(3*π)^2 = 0.135335
# 3) | Задание 3
sin(1) = 0.841471
cos(1) = 0.540302
x := 12, 11 .. 0 = [12; 11; 10; 9; 8; 7; 6; 5; 4; 3; 2; 1; 0]
tan(1) = 1.55741
asin(12) = 1.5708 - 3.17631i
acos(π) = 1.81153i
angle(2, 8) = 1.32582
sin(x) = [-0.536573; -0.99999; -0.544021; 0.412118; 0.989358; 0.656987; -0.279415; -0.958924; -0.756802; 0.14112; 0.909297; 0.841471; 0]
x := 12, 11.9 .. 0 = [
    12; 11.9; 11.8; 11.7; 11.6; 11.5; 11.4; 11.3; 11.2; 11.1
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]
sin(x) = [
    -0.536573; -0.618137; -0.693525; -0.761984; -0.822829; -0.875452; -0.919329; -0.954019; -0.979178; -0.994553
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]
