# Задание 4.1 | Задание 4.2 | Задание 4.3
b := -10, -7.5 .. 10
x := -1, -0.99 .. 5
a := -1, -0.9 .. 1
sin(b)^2 + cos(b) = [-0.543113; 1.22648; 1.2032; -0.442975; 1; -0.442975; 1.2032; 1.22648; -0.543113]
|x - 1|^2 =  # no stored result
cos(3*x)^2 =  # no stored result
sqrt(sin(b)) = [0.737578; 0.968504i; 0.979247; 0.77361i; 0; 0.77361; 0.979247i; 0.968504; 0.737578i]
sqrt(log(sin(a))) = [0.803577 + 0.848939i; 0.794492 + 0.858647i; 0.783491 + 0.870703i; 0.770295 + 0.885619i; 0.754502 + 0.904157i; 0.735512 + 0.927501i; 0.712371 + 0.95763i; 0.683402 + 0.998224i; 0.645156 + 1.0574i; 0.587923 + 1.16034i; 0.172261 + 3.96021i; 1.00036i; 0.837776i; 0.727608i; 0.639987i; 0.565048i; 0.498223i; 0.436998i; 0.379823i; 0.325664i; 0.27379i]
f(b) := sin(b)^2 + cos(b)
g(b) := sqrt(sin(b))
f(b)*g(b) = [-0.400588; 1.18785i; 1.17823; -0.34269i; 0; -0.34269; 1.17823i; 1.18785; -0.400588i]
f(b) + g(b) = [0.194465; 1.22648 + 0.968504i; 2.18244; -0.442975 + 0.77361i; 1; 0.330635; 1.2032 + 0.979247i; 2.19498; -0.543113 + 0.737578i]
2^a = [0.5; 0.535887; 0.574349; 0.615572; 0.659754; 0.707107; 0.757858; 0.812252; 0.870551; 0.933033; 1; 1.07177; 1.1487; 1.23114; 1.31951; 1.41421; 1.51572; 1.6245; 1.7411; 1.86607; 2]
f(x) := |x - 1|^2
g(x) := cos(3*x)^2
f(x) + g(x) =  # no stored result
f(x) - g(x) =  # no stored result
f(x)*g(x) =  # no stored result
f(b) - g(b) = [120.976; 71.4873; 35.4229; 12.1298; 0; 2.12984; 15.4229; 41.4873; 80.9762]
f(a) := sqrt(log(sin(a)))
g(a) := 2^a
f(a)*g(a) = [0.401789 + 0.42447i; 0.425758 + 0.460138i; 0.449998 + 0.500088i; 0.474172 + 0.545163i; 0.497786 + 0.596521i; 0.520086 + 0.655842i; 0.539876 + 0.725748i; 0.555095 + 0.81081i; 0.561641 + 0.92052i; 0.548552 + 1.08263i; 0.172261 + 3.96021i; 1.07216i; 0.962352i; 0.89579i; 0.844468i; 0.799098i; 0.755165i; 0.709906i; 0.66131i; 0.60771i; 0.54758i]
f(a) + g(a) = [
    1.30358 + 0.848939i;
    1.33038 + 0.858647i;
    1.35784 + 0.870703i;
    1.38587 + 0.885619i;
    1.41426 + 0.904157i;
    1.44262 + 0.927501i;
    1.47023 + 0.95763i;
    1.49565 + 0.998224i;
    1.51571 + 1.0574i;
    1.52096 + 1.16034i;
    1.17226 + 3.96021i;
    1.07177 + 1.00036i;
    1.1487 + 0.837776i;
    1.23114 + 0.727608i;
    1.31951 + 0.639987i;
    1.41421 + 0.565048i;
    1.51572 + 0.498223i;
    1.6245 + 0.436998i;
    1.7411 + 0.379823i;
    1.86607 + 0.325664i;
    2 + 0.27379i
]
f(a) - g(a) = [
    0.303577 + 0.848939i;
    0.258605 + 0.858647i;
    0.209142 + 0.870703i;
    0.154723 + 0.885619i;
    0.094748 + 0.904157i;
    0.0284056 + 0.927501i;
    -0.0454873 + 0.95763i;
    -0.12885 + 0.998224i;
    -0.225395 + 1.0574i;
    -0.34511 + 1.16034i;
    -0.827739 + 3.96021i;
    -1.07177 + 1.00036i;
    -1.1487 + 0.837776i;
    -1.23114 + 0.727608i;
    -1.31951 + 0.639987i;
    -1.41421 + 0.565048i;
    -1.51572 + 0.498223i;
    -1.6245 + 0.436998i;
    -1.7411 + 0.379823i;
    -1.86607 + 0.325664i;
    -2 + 0.27379i
]
