# Задание 5
S := 50
h := 5 .. 15
S*h = [250; 300; 350; 400; 450; 500; 550; 600; 650; 700; 750]
# Задание 6
S1 := 15
S2 := 20 .. 35
H := 10 .. 20
1/3*(S1 + S2 + sqrt(S1*S2))*H = [
    174.402; 179.161; 183.886; 188.581; 193.246; 197.883; 202.495; 207.082; 211.646; 216.189
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]
