# Задание 7
A := [3, 2, 1; 0, 5, 6; 1, 4, 2]
B := [1, 2, 3; 5, 6, 4; 2, 3, 1]
C := [5, 1, 2; 4, 1, 3; 7, 8, 1]
transpose(A) = [3, 0, 1; 2, 5, 4; 1, 6, 2]
C + B - A = [3, 1, 4; 9, 2, 1; 8, 7, 0]
A + B = [4, 4, 4; 5, 11, 10; 3, 7, 3]
A*5 = [15, 10, 5; 0, 25, 30; 5, 20, 10]
B^2 = [17, 23, 14; 43, 58, 43; 19, 25, 19]
A - B = [2, 0, -2; -5, -1, 2; -1, 1, 1]
B/2 = [0.5, 1, 1.5; 2.5, 3, 2; 1, 1.5, 0.5]
C^2 = [43, 22, 15; 45, 29, 14; 74, 23, 39]
A*C = [30, 13, 13; 62, 53, 21; 35, 21, 16]
A^-1 = [0.4, 0, -0.2; -0.171429, -0.142857, 0.514286; 0.142857, 0.285714, -0.428571]
(A + B)*C = [64, 40, 24; 139, 96, 53; 64, 34, 30]
|A| = -35
