# Задание 1 | Задание 2 | Задание 3
# Пример | Ответ | Пример | Ответ
# Пример | Ответ
1
limit((sqrt(1 + sin(x)) - sqrt(1 - sin(x)))/x, x → 0)
sin((α + β)/2)*cos((α - β)/2)
sin(β)/2 + sin(α)/2
sin(α/2)*2*sin(α)*cos(α)/cos(α/2)
cos(α)*sin(α) + 2*sin(α/2)*cos(α)^2/cos(α/2) - 2*sin(α/2)*sin(α)^2/cos(α/2) + sin(α/2)^2*cos(α)*sin(α)/cos(α/2)^2
1/(q + w)^2
(q^2 - w^4)/((q + w)^2*(q^2 - w^4))
0
6/π*integral(cos(x), x = π .. 2*π)
2
integral(sqrt(x^2 - 2*x + 1), x = -1 .. 1)
-(3*sqrt(x) - 2)/(x^(3/2)*(sqrt(x) - 2)^3)
(sqrt(x) + 2)/(2*sqrt(x)*(sqrt(x) - 2)^2) - 1/(2*sqrt(x)*(sqrt(x) - 2))
d/dx(d/dx((2 + sqrt(x))/(2 - sqrt(x))))
(2 + sqrt(x))/(2 - sqrt(x))
π*integral((1 - cos(2*x))/2, x = 0 .. π)  # π^2/2
sin(α/2)*2*sin(α)*cos(α)/cos(α/2)
-2*cos(α)*(cos(α) - 1)
product((2*n^2 + 28 + n^5)/(2*n^3), n = 1 .. 6)
260303737375891/373248000
sqrt((x^2 - 1)^2/(4*x^2) + 1)/(x^2 + 1) - 2*x^2*sqrt((x^2 - 1)^2/(4*x^2) + 1)/(x^2 + 1)^2 + x*((x^2 - 1)/x - (x^2 - 1)^2/(2*x^3))/(2*sqrt((x^2 - 1)^2/(4*x^2) + 1)*(x^2 + 1))
sqrt(1 + ((x^2 - 1)/(2*x))^2)/((x^2 + 1)*1/x)
3*sin(α) - 4*sin(α)^3
sin(3*α)
d/dx(d/dx(sin(x)))
-sin(x)
6*n^4 - 15*n^3 + 10*n^2 - 1
24*n^3 - 45*n^2 + 20*n
sin(α)^2 + cos(α)^2
0
# Задание 4 | Задание 5
5*x^4 + 7*x^8 + 9*x^3 + 7*x^2
[0; 1]
-x/2
integral(sin(x)*cos(3*x), x = 0 .. π/2)
(a*x + d*x^2)*(a*x^2 - d*x^4)*(a*x - d)
[0; 1]
(4*w^5 + 7*1/w - 8*w^-4)*(2*w - 9*w^3)
integral(sqrt(x^2 - 2*x + 1), x = -1 .. 1)
2*x
[0; 1]
[(a*x^3 + d*x + c)/(a*x^3 - c*x^2)]
[{1,1}]
integral((sqrt(1 + cos(2*x)) - sqrt(1 - sin(x)))/x, x = 0 .. π)  # С этим интегралом нездача - комп виснет,видимо,опечатка
3*π*x/8
3*π*y/8
integral(integral(cos(x)^4*sin(y), x = 0 .. π), y = 0 .. π/2)
