# Задание 1 | Задание 2 | Задание 3
x^2 + 3*x + 1
2*x + 3
x := 3
k := -3
y(x) := x - cos(x)
y(k) := k^2 - cos(k)
asin(2*x) + 6*x^3
18*x^2 + 2/sqrt(1 - 4*x^2)
d/dx(y(x)) = 6.14112
d^2/dk^2(y(k)) = 1.01001
a := -3
3*x^2 + 3/(2*sqrt(x + 2))
x^3 + 3*sqrt(x + 2)
y(a) := 0.5^a*cos(a)
l := 2
d/da(y(a)) = 6.61864
6*x/sqrt(x^3 - 4*x + 5) - (3*x^2 + 1)*(3*x^2 - 4)/(2*(x^3 - 4*x + 5)^(3/2))
y(l) := e^(-2*l) + l^3
(3*x^2 + 1)/sqrt(x^3 - 4*x + 5)
b := 3
d^3/dl^3(y(l)) = 5.85347
y(b) := sin(3/b + 3) + 2^b
4*x/sqrt(x + 2) - (2*x^2 + 1)/(2*(x + 2)^(3/2))
m := 0.5
e^m + 4*m^3/3
(2*x^2 + 1)/sqrt(x + 2)
d/db(y(b)) = 5.76306
y(m) := e^m + 4*m^3/3
c := 2
d^5/dm^5(y(m)) = 1.64872
y(c) := sin(c)^2 + c^2
sqrt(x - 3) + 1/4*tan(2*x)
tan(2*x)^2/2 + 1/(2*sqrt(x - 3)) + 1/2
o := 1
d/dc(y(c)) = 3.2432
y(o) := 5*sin(o)^2 + cos(o)^2
h := -2
y(h) := 5*(sin(h) - cos(5*h))
d^3/do^3(y(o)) = 596.626
d/dh(y(h)) = 11.5198
j := 3
y(j) := 12*cos(j) - j
d/dj(y(j)) = -2.69344
# Задание 4
integral(x^2/sqrt(x^6 + 4), x = 0 .. 1) = 0.160404
integral(1/sqrt(5 + 4*x - x^2), x = 2 .. 3.5) = 0.523599
integral(x^3 + 3*x^2 + 1, x)
x^5/20 + x^4/4 + x^2/2
integral(e^x/(1 + e^(2*x)), x = 0 .. 1) = 0.432885
integral(x^2 - 2*x + 3, x = 1 .. 2) = 2.33333
integral(integral(18*x^2*y^2 + 32*x^2*y, x), y)
x^3*y^4/2 + 16*x^3*y^3/9
integral(sin(x), x = -1 .. 3) = 1.53029
integral(1/(2 + cos(x)), x = 0 .. π/2) = 0.6046
integral(e^x*sin(3/x + 3), x = 5 .. 0) = 83.066
integral((x^3 + 1)/(x^2 + 2*x), x)
7*ln(x + 2) - 4*x + 7*x*ln(x + 2)/2 - x^2 + x^3/6 + x*ln(x)/2
integral(tan(x), x = -π/2 .. π/4)
integral(integral(integral((x^2 - 2*y)*y + 3*z, x = 0 .. 3), y = 1 .. 2), z = -1 .. 1) = -1
