# Задание 1
# Задание 2
# Задание 3
# Задание 5 (формулировка задания в методичке дана очень странно)
# Задание 6
Given
# Задание 4
x^2 + 2*x - 4 == 0
sqrt(3*x + 4) + sqrt(x - 4) == 2*sqrt(x) solve → 4
f(x) := x^2 + cos(x) - 5
# 1)
p(x) := x^4 - 2*x^3 + 10*x + 5
a := 0 .. 9
Find(x) → [sqrt(5) - 1, -sqrt(5) - 1]
# 1)
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f(a) := (a - 10)/(a^2 + 5)
Given
# 1)
x^4 - 2*x^3 + 10*x + 5 coeffs → [5; 10; 0; -2; 1]
polyroots([5; 10; 0; -2; 1]) = [-1.37298; -0.539995; 1.95649 - 1.70768i; 1.95649 + 1.70768i]
8^(2/x) - 2^((3*x + 3)/x) + 12 == 0 solve → [3; 3/log(6, 2)]
x^2 + x - 2 == 0
f(a) = [-2; -1.5; -0.888889; -0.5; -0.285714; -0.166667; -0.097561; -0.0555556; -0.0289855; -0.0116279]
x^2 - (3*n + 2)*x^2 - 2*x + 12 == 0 solve, x → [(sqrt(36*n + 13) - 1)/(3*n + 1); -(sqrt(36*n + 13) + 1)/(3*n + 1)]
Find(x) → [1, -2]
Given
x^log(x) == 1000*x^2 solve → 1000.0 = 1000
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x^2 - 4*x - 8 == 0
Find(x) → [2*sqrt(3) + 2, 2 - 2*sqrt(3)]
Given
8^x - 2^((x - 2)/x) - 14 == 0 solve → 1.29205791506
(sqrt(36*n + 13) - 1)/(3*n + 1)/(-(sqrt(36*n + 13) + 1)/(3*n + 1)) == 1/2 solve → -29/81
x^2 + 2*x - 24 == 0
Find(x) → [4, -6]
Given
x^2 - 2*x - 4 == 0
2^x + (x + 6)/10 + 4*x == 0 solve → -LambertW(5*2^(35/41)*ln(2)/41)/ln(2) - 6/41
Find(x) → [sqrt(5) + 1, 1 - sqrt(5)]
x^2 - (3*(-29/81) + 2)*x^2 - 2*x + 12 == 0 solve, x → [9; 18]  # 2)
Given
f(a) := a^2 + a - 4
2*x^2 - 5*x - 10 == 0
f(a) = [-4; -2; 2; 8; 16; 26; 38; 52; 68; 86]
# 2)
p(x) := x^4 - 10*x + 2
Find(x) → [sqrt(105)/4 + 5/4, 5/4 - sqrt(105)/4]
# 2)
Given
x^2 + 7*x + 10*(n - 1) + 8 == 0 solve, x → [sqrt(57 - 40*n)/2 - 7/2; -sqrt(57 - 40*n)/2 - 7/2]
x^2 + x - 10 == 0
p(x) coeffs → [2; -10; 0; 0; 1]
polyroots([2; -10; 0; 0; 1]) = [-1.14166 - 1.86901i; -1.14166 + 1.86901i; 0.200161; 2.08315]
Find(x) → [sqrt(41)/2 - 1/2, -sqrt(41)/2 - 1/2]
Given
(sqrt(57 - 40*n)/2 - 7/2)/(-sqrt(57 - 40*n)/2 - 7/2) == 1/3 solve → 179/160
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3*x^2 - 4*x + 1 == 0
Find(x) → [1, 1/3]
3*x^2 - (4*x + 2)/(2*x) - 6 == 0 solve → [
    ((-943/1458 + sqrt(1967)*1i/162)^(1/3) + 8/9)/(1/6 + sqrt(1967)*1i/54)^(1/3);
    -(9*(-943/1458 + sqrt(1967)*1i/162)^(1/3) + 8 - 9i*sqrt(3)*(-943/1458 + sqrt(1967)*1i/162)^(1/3) + 8i*sqrt(3))/(18*(1/6 + sqrt(1967)*1i/54)^(1/3));
    -(9*(-943/1458 + sqrt(1967)*1i/162)^(1/3) + 8 - 8i*sqrt(3) + 9i*sqrt(3)*(-943/1458 + sqrt(1967)*1i/162)^(1/3))/(18*(1/6 + sqrt(1967)*1i/54)^(1/3))
]
Given
# 3)
f(a) := (a^2 - 1)/(a^2 + 4)
x^2 - 6*x + 1 == 0
x^2 + 7*x + 10*(179/160 - 1) + 8 == 0 solve, x → [-7/4; -21/4]
Find(x) → [2*sqrt(2) + 3, 3 - 2*sqrt(2)]
f(a) = [-0.25; 0; 0.375; 0.615385; 0.75; 0.827586; 0.875; 0.90566; 0.926471; 0.941176]
Given
# 3)
x^2 - 2*x - 2 == 0
x^2 - (3*n + 2*x)*n + n^2 - 10 == 0 solve, x → [n + sqrt(3*n^2 + 10); n - sqrt(3*n^2 + 10)]
Find(x) → [sqrt(3) + 1, 1 - sqrt(3)]
Given
# 5)
p(x) := x^4 - 4*x^3 - x - 10
(n + sqrt(3*n^2 + 10))/(n - sqrt(3*n^2 + 10)) == 1/2 solve → -3i*sqrt(65)/13
2*x^2 - 2*x - 4 == 0
Find(x) → [-1, 2]
x^2 + 12*x + 4 - x == (x + 3)/2 solve → [sqrt(401)/4 - 21/4; -sqrt(401)/4 - 21/4]
polyroots([-10; -1; 0; -4; 1]) = [-1.19258; 0.5 + 1.32288i; 0.5 - 1.32288i; 4.19258]
p(x) coeffs → [-10; -1; 0; -4; 1]
Given
x^2 - (3*(-3i*sqrt(65)/13) + 2*x)*(-3i*sqrt(65)/13) + (-3i*sqrt(65)/13)^2 - 10 == 0 solve, x → [-2i*sqrt(65)/13; -4i*sqrt(65)/13]
x^2 + 5*x + 2 == 0
# 4)
f(a) := (a + 11)/(a + 4)
Find(x) → [sqrt(17)/2 - 5/2, -sqrt(17)/2 - 5/2]
# Уравнение под цифрой 6 вешает компьютер,возможна опечатка
# 4)
f(a) = [2.75; 2.4; 2.16667; 2; 1.875; 1.77778; 1.7; 1.63636; 1.58333; 1.53846]
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2*x^2 + 3*x - 2 - 7*n == 0 solve, x → [sqrt(56*n + 25)/4 - 3/4; -sqrt(56*n + 25)/4 - 3/4]
x^2 - (x^2 - 2)/8 + 12*x - 10 == 0 solve → [5*sqrt(114)/7 - 48/7; -5*sqrt(114)/7 - 48/7]
(sqrt(56*n + 25)/4 - 3/4)/(-sqrt(56*n + 25)/4 - 3/4) == 1/3 solve → -13/32
2*x^2 - x + 4 - 1 == x + 4 solve → [sqrt(3)/2 + 1/2; 1/2 - sqrt(3)/2]
# 3)
p(x) := x^3 + x - 7
2*x^2 + 3*x - 2 - 7*(-13/32) == 0 solve, x → [-3/8; -9/8]  # 5)
f(a) := (a^2 + 1)/(a + 14)
# 5)
f(a) = [0.0714286; 0.133333; 0.3125; 0.588235; 0.944444; 1.36842; 1.85; 2.38095; 2.95455; 3.56522]
p(x) coeffs → [-7; 1; 0; 1]
polyroots([-7; 1; 0; 1]) = [-0.869602 + 1.80793i; -0.869602 - 1.80793i; 1.7392]
x^2 - n*x - n == 0 solve, x → [n/2 + sqrt(n*(n + 4))/2; n/2 - sqrt(n*(n + 4))/2]
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(n/2 + sqrt(n*(n + 4))/2)/(n/2 - sqrt(n*(n + 4))/2) == 3 solve →  # error: Решение не было найдено.
# 6)
2*x^2 + 5*x + n - 7*(n - 1) == 0 solve, x → [sqrt(48*n - 31)/4 - 5/4; -sqrt(48*n - 31)/4 - 5/4]
# 6)
f(a) := (a + 1)/(a + 34)
# 4)
p(x) := x^4 + 2*x^2 - x
f(a) = [0.0294118; 0.0571429; 0.0833333; 0.108108; 0.131579; 0.153846; 0.175; 0.195122; 0.214286; 0.232558]
(sqrt(48*n - 31)/4 - 5/4)/(-sqrt(48*n - 31)/4 - 5/4) == 1/2 solve → 19/27
p(x) coeffs, x → [0; -1; 2; 0; 1]
polyroots([0; -1; 2; 0; 1]) = [-0.226699 - 1.46771i; -0.226699 + 1.46771i; 0; 0.453398]
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2*x^2 + 5*x + 19/27 - 7*(19/27 - 1) == 0 solve, x → [-5/3; -5/6]
# 7)
2*x^2 - 5*x + 2*n - (n + 1) == 0 solve, x → [sqrt(33 - 8*n)/4 + 5/4; 5/4 - sqrt(33 - 8*n)/4]  # 7)
f(a) := (a - 1)/(a + 7)
f(a) = [-0.142857; 0; 0.111111; 0.2; 0.272727; 0.333333; 0.384615; 0.428571; 0.466667; 0.5]
(sqrt(33 - 8*n)/4 + 5/4)/(5/4 - sqrt(33 - 8*n)/4) == 2 solve → 34/9
# 6)
p(x) := x^4 - 3*x^2 + 3*x
2*x^2 - 5*x + 2*34/9 - (34/9 + 1) == 0 solve, x → [5/3; 5/6]
# 8)
p(x) coeffs → [0; 3; -3; 0; 1]
polyroots([0; 3; -3; 0; 1]) = [-2.1038; 0; 1.0519 + 0.565236i; 1.0519 - 0.565236i]
x^2 - (1 + 4*x)*n - 6*n^2 - 2 == 0 solve, x → [2*n + sqrt(10*n^2 + n + 2); 2*n - sqrt(10*n^2 + n + 2)]
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# 8)
f(a) := a + (a + 2)/(a + 24)
(2*n + sqrt(10*n^2 + n + 2))/(2*n - sqrt(10*n^2 + n + 2)) == 1/2 solve → [-9/172 + 3i*sqrt(679)/172; -9/172 - 3i*sqrt(679)/172]
f(a) = [0.0833333; 1.12; 2.15385; 3.18519; 4.21429; 5.24138; 6.26667; 7.29032; 8.3125; 9.33333]
x^2 - (1 + 4*x)*(-9/172 - 3i*sqrt(679)/172) - 6*(-9/172 - 3i*sqrt(679)/172)^2 - 2 == 0 solve, x → [
    sqrt(-670/1849 + 6i*sqrt(679)/1849)/2 - 9/86 - 3i*sqrt(679)/86;
    -sqrt(-670/1849 + 6i*sqrt(679)/1849)/2 - 9/86 - 3i*sqrt(679)/86
]
# 7)
p(x) := x^4 + 2*x^3 - 7*x - 2
# 9)
2*x^2 + 10*x + n - 5*(n + 1) == 0 solve, x → [sqrt(8*n + 35)/2 - 5/2; -sqrt(8*n + 35)/2 - 5/2]
p(x) coeffs → [-2; -7; 0; 2; 1]
polyroots([-2; -7; 0; 2; 1]) = [-1.62067 + 1.35808i; -1.62067 - 1.35808i; -0.291776; 1.53313]
# 9)
f(a) := a + 12*a^-1
(sqrt(8*n + 35)/2 - 5/2)/(-sqrt(8*n + 35)/2 - 5/2) == 1/2 solve → -145/36
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f(a) =  # error: При попытке расчета этого выражения найдено число с абсолютной величиной больше 10^307.  # Деление на ноль,возможно опечатка
2*x^2 + 10*x + (-145/36) - 5*(-145/36 + 1) == 0 solve, x → [-5/3; -10/3]
# 10)
f(a) := a^2*(a + 1)/(a + 4)
# 10)
f(a) = [0; 0.4; 2; 5.14286; 10; 16.6667; 25.2; 35.6364; 48; 62.3077]
x^2 - (3*n + 3) + n^2 - 2*x + 6 == 0 solve, x → [sqrt(-(n - 1)*(n - 2)) + 1; 1 - sqrt(-(n - 1)*(n - 2))]
# 8)
p(x) := 2*x^3 + 2*x + 2
(sqrt(-(n - 1)*(n - 2)) + 1)/(1 - sqrt(-(n - 1)*(n - 2))) == 2 solve → [sqrt(5)/6 + 3/2; 3/2 - sqrt(5)/6]
p(x) coeffs → [2; 2; 0; 2]
polyroots([2; 2; 0; 2]) = [-0.682328; 0.341164 - 1.16154i; 0.341164 + 1.16154i]
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x^2 - (3*(sqrt(5)/6 + 3/2) + 3) + (sqrt(5)/6 + 3/2)^2 - 2*x + 6 == 0 solve, x → [2/3; 4/3]  # 11)
f(a) := (a^2 - 4)/(a + 4)
f(a) = [-1; -0.6; 0; 0.714286; 1.5; 2.33333; 3.2; 4.09091; 5; 5.92308]
# 9)
p(x) := 2*x^4 - x^3 - 2*x - 1
p(x) coeffs → [-1; -2; 0; -1; 2]
polyroots([-1; -2; 0; -1; 2]) = [-0.427523; -0.190225 - 0.926266i; -0.190225 + 0.926266i; 1.30797]
# 12)
f(a) := a^2 + 2*a^2 - 1
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f(a) = [-1; 2; 11; 26; 47; 74; 107; 146; 191; 242]
# 10)
p(x) := 2*x^4 + 3*x^3 + 2*x^2 - x
p(x) coeffs → [0; -1; 2; 3; 2]
polyroots([0; -1; 2; 3; 2]) = [-0.908591 - 0.866511i; -0.908591 + 0.866511i; 0; 0.317183]
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