# Задание 1 | Задание 2 | Задание 3 | Задание 4
a1 := 1
[2.5*x - 1.7*y == 7.5; -0.15*x + 0.3*y == 4.5] solve, [x; y] → [20.0, 25.0]
a2 := 1
A := [1.5, 5.5, 2.5; 0.9, 4.3, 6; 2.1, 1.3, 3]
C := [10, 1, 1; 2, 10, 6; 2, 2, 10]
[3*x + 5*y == 16; 6*x - 4*y == 10] solve, [x; y] → [19/7, 11/7]
B := [21.25; 32.25; 18.15]
D := [12; 13; 14]
[5*x - 3*y == 1.6; 4*x + 4*y == 9/25] solve, [x; y] → [0.23375, -0.14375]
A^-1*B = [2; 1.5; 4]
lsolve(A, B) = [2; 1.5; 4]
C^-1*D = [1.04673; 0.42757; 1.10514]
[2*x - 2.25*y == 10; 3*x + 4*y == 24] solve, [x; y] → [6.37288135593, 1.22033898305]
A := [2, -3.5, 4.5; 2.5, -4, -1; 3, 4, -2.5]
x1 := 0
x2 := 0
x3 := 0
Given
B := [0.5; 1; 10]
10*x1 + x2 + x3 == 12
2*x1 + 10*x2 + 6*x3 == 13
2*x1 + 2*x2 + 10*x3 == 14
A^-1*B = [2; 1; 0]
lsolve(A, B) = [2; 1; 0]
Find(x1, x2, x3) = [1.04673; 0.42757; 1.10514]
A := [1.2, 2.1, 2.5, 0.5; 1.5, -1.5, 7, 4; 10, 2.5, -3.5, 1.5; 6.5, 1.3, -4.5, 2.5]
C := [2, 3, -4, 1; 0.1, -2, -5, 1; 0.15, -3, 1, -4; 10, 2, -1, 2.1]
B := [10.45; 13.75; 28.75; 18.1]
D := [3.1; 2; 1; -4.7]
C^-1*D = [-0.476369; 0.563797; -0.813883; -0.894182]
A^-1*B = [2.5; 2; 1; 1.5]
lsolve(A, B) = [2.5; 2; 1; 1.5]
x1 := 0
A := [6.5, 7; 19.5, 14.5]
x2 := 0
x3 := 0
x4 := 0
B := [74; 189.5]
Given
2*x1 + 3*x2 - 4*x3 + x4 == 3.1
0.1*x1 - 2*x2 - 5*x3 + x4 == 2
A^-1*B = [6; 5]
lsolve(A, B) = [6; 5]
0.15*x1 - 3*x2 + x3 - 4*x4 == 1
10*x1 + 2*x2 - x3 + 2.1*x4 == -4.7
Find(x1, x2, x3, x4) = [-0.476369; 0.563797; -0.813883; -0.894182]
C := [7, 0, 0, 2, 3; 0, 4, 3, 0, 1; 1, 1, 2, 0, 1; 0, 0, 1, 2, 2; 2, 8, 3, 1, 0]
D := [12; 12; 5; 5; 22]
C^-1*D = [0.646259; 2.63265; -0.251701; 0.401361; 2.22449]
x1 := 0
x2 := 0
x3 := 0
x4 := 0
x5 := 0
Given
7*x1 + 2*x4 + 3*x5 == 12
4*x2 + 3*x3 + x5 == 12
x1 + x2 + 2*x3 + x5 == 5
x3 + 2*x4 + 2*x5 == 5
2*x1 + 8*x2 + 3*x3 + x4 == 22
Find(x1, x2, x3, x4, x5) = [0.646259; 2.63265; -0.251701; 0.401361; 2.22449]
