# Задание 2
x := 1, 1.4 .. 7
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x := -5, -4.5 .. 5
f(x) := x^2
y(x) := sin(x)
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x := -4, -3.7 .. 4
f(x) := x^2 - 3
y(x) := sin(x)^2 - cos(x)
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x := -4, -3.5 .. 4
f(x) := x^2 - 43
y(x) := sin(x)^2 + cos(x)
z(x) := x - 0.8124
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