# Задание 3
x1 := 1
y1 := 2
x2 := -2
y2 := -4
k := (y2 - y1)/(x2 - x1)
k = 2
y(x) := k*(x - x1) + y1
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x1 := 1
y1 := 3
x2 := -1
y2 := 5
k := (y2 - y1)/(x2 - x1)
k = -1
y(x) := k*(x - x1) + y1
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x1 := 2
y1 := -1
x2 := 3
y2 := 2
k := (y2 - y1)/(x2 - x1)
k = 3
y(x) := k*(x - x1) + y1
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x1 := 2
y1 := 1
x2 := -3
y2 := -4
k := (y2 - y1)/(x2 - x1)
k = 1
y(x) := k*(x - x1) + y1
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x1 := -4
y1 := 1
x2 := 2
y2 := 4
k := (y2 - y1)/(x2 - x1)
k = 0.5
y(x) := k*(x - x1) + y1
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x1 := -3
y1 := 3
x2 := 3
y2 := 1
k := (y2 - y1)/(x2 - x1)
k = -0.333333
y(x) := k*(x - x1) + y1
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