# Задание 4
y(x) := x^3 - 3*x
y1(x) := d/dx(y(x))
y2(x) := d^2/dx^2(y(x))
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y(x) := (x^2 + 1)*ln(x)
y1(x) := d/dx(y(x))
y2(x) := d^2/dx^2(y(x))
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y(x) := x + sin(x)
y1(x) := d/dx(y(x))
y2(x) := d^2/dx^2(y(x))
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