# Задание 1
z(x, y) := x*y + sin(x*y)
# [component: inputs z]
z(x, y) := 2*x^2 + y^2*cos(y) + sin(x)
# [component: inputs z]
z(x, y) := x^2*sin(x) + 3*y^2*cos(y)
# [component: inputs z]
z(x, y) := 2*x^2 + 5*y + sin(x*y)
# [component: inputs z]
z(x, y) := 2*x*sin(x) + 4*cos(y)
# [component: inputs z]
z(x, y) := x^2 + y^2
# [component: inputs z]
