ORIGIN := 1
m := 3
n := 2
c := [3; 2]
a := [1, 1; -1, -2; -2, -1]
b := [4; -5; -6]
f(x) := sum(c[j]*x[j], j = 1 .. n)
x[n] := 0
Given
a*x ≤ b
x ≥ 0
x := Minimize(f, x)
x = [2.33333; 1.33333]
f(x) = 9.66667
