# Задание 1
ORIGIN := 1
n := 3
m := 2
c := [3; 2]
a := [1, 1; 1, 2; 2, 1]
b := [4; 5; 6]
f(x) := sum(c[j]*x[j], j = 1 .. n)
x := [1; 0]
Given
a*x ≤ b
x ≥ 0
z := Minimize(f, x)  # error: Эта переменная не определена.
