P := 1000000
N := 2000000
K := 10
T := 100  # Для остальных вариантов тупо подставить другие данные)
f(t, y) := P - 1/K*y
g(t, z) := -z/K
t[0] := 1
y[0] := N
z[0] := N
τ := 1
a := 1
b := T
n := (b - a)/τ
n = 99
i := 1 .. n
t[i] := t[0] + i*τ
y[i] := y[i - 1] + τ*f(t[i - 1], y[i - 1])
z[i] := z[i - 1] + τ*g(t[i - 1], z[i - 1])
z = [
    2000000; 1800000; 1620000; 1458000; 1312200; 1180980; 1062882; 956594; 860934; 774841
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]
y = [
    2000000; 2800000; 3520000; 4168000; 4751200; 5276080; 5748472; 6173625; 6556262; 6900636
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]
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